// COMSOL Multiphysics 6.0.0.405 model "hwk1.mph"
// Outline of the model tree

Geometry
  geom1 "Geometry 1" (2D, length unit m)
    r1: Rectangle | size = {0.6, 1}
    fin: Finalize "Form Union"

Physics
  ht: HeatTransfer "Heat Transfer in Solids" on domains 1
    dependent variable T
    solid1: SolidHeatTransferModel "Solid 1" (default) | k_mat = userdef; k = 52
    init1: init "Initial Values 1" (default)
    ins1: ThermalInsulation (default)
    temp1: TemperatureBoundary "Temperature 1" on boundaries 2 | T0 = 373.15[K]
    hf1: HeatFluxBoundary "Heat Flux 1" on boundaries 3, 4 | HeatFluxType = ConvectiveHeatFlux; h = 750; Text = 273.15[K]

Mesh
  mesh1 "Mesh 1"
    size: MeshSizeDefault | hmax = 0.067; hmin = 3.0E-4; hcurve = 0.3; hgrad = 1.3
    map1: Map "Mapped 1" on remaining entities

Studies
  std1 "Study 1"
    stat: Stationary

Solver configurations
  sol1 "Solution 1" (study std1)
    v1: Variables "Dependent Variables 1"
    s1: Stationary "Stationary Solver 1"
      fc1: FullyCoupled | linsolver = d1; initstep = 0.01; minstep = 1.0E-6; maxiter = 50
      d1: Direct "Direct, heat transfer variables (ht)" | linsolver = pardiso; pivotperturb = 1.0E-13

Datasets
  dset1: Solution | solution = sol1
  cpt1: CutPoint2D | data = dset1; pointx = 0.6; pointy = 0.2
  cpt2: CutPoint2D | data = dset1; pointx = 0.3; pointy = 0.1

Derived values
  pev1: EvalPoint "Point Evaluation 1" | data = cpt1; table = tbl1; expr = T
  pev2: EvalPoint "Point Evaluation 2" | data = cpt2; table = tbl2; expr = T

Tables
  tbl1: Table
    // Point Evaluation 1
    Temperature (K), Point: (0.6, 0.2)
    291.415
  tbl2: Table
    // Point Evaluation 2
    Temperature (K), Point: (0.3, 0.1)
    353.221

Plots
  pg1: PlotGroup2D "Temperature (ht)" | data = dset1
    surf1: Surface | expr = T
  pg2: PlotGroup2D "Isothermal Contours (ht)" | data = dset1
    con1: Contour | expr = T; levelrounding = off