// COMSOL Multiphysics 6.0.0.405 model "Untitled.mph"
// Outline of the model tree

Geometry
  geom1 "Geometry 1" (2D, length unit m)
    r1: Rectangle | size = {5, 1}
    r2: Rectangle | pos = {5, 0}; size = {5, 1}
    fin: Finalize "Form Union"

Materials
  mat1: Common "Material 1" on domains 1
    Lame "Lamé parameters"
      lambLame = 365
      muLame = 188

Physics
  solid: SolidMechanics on all domains
    dependent variable u = {u, v, w}
    lemm1: LinearElasticModel "Linear Elastic Material 1" (default)
    free1: Free (default)
    init1: init "Initial Values 1" (default)
    disp1: Displacement1 "Prescribed Displacement 1" on boundaries 1 | Direction = {1, 1, 0}
    bndl1: BoundaryLoad on boundaries 2, 3, 5, 6
    bndl2: BoundaryLoad on boundaries 7 | FperArea = {0, -0.1, 0}

Mesh
  mesh1 "Mesh 1" (physics-controlled)

Studies
  std1 "Study 1"
    stat: Stationary