// COMSOL Multiphysics 6.0.0.318 model "mixMaterialBeam_coarse.mph"
// Outline of the model tree

Parameters
  mesh_size = 0.05

Geometry
  geom1 "Geometry 1" (2D, length unit m)
    r1: Rectangle "leftRec" | size = {5, 1}
    r2: Rectangle | pos = {5, 0}; size = {5, 1}
    fin: Finalize "Form Union"

Physics
  solid: SolidMechanics on all domains
    dependent variable u = {u, v, w}
    Type2D.Type2D = PlaneStress
    d.d = 0.0001
    lemm1: LinearElasticModel "leftMat" (default)
      IsotropicOption = Lame
      lambLame_mat = userdef
      lambLame = 365
      muLame_mat = userdef
      muLame = 188
    free1: Free (default)
    init1: init "Initial Values 1" (default)
    lemm2: LinearElasticModel "rightMat" on domains 2
      IsotropicOption = Lame
      lambLame_mat = userdef
      lambLame = 36.5
      muLame_mat = userdef
      muLame = 18.8
    disp1: Displacement1 "Prescribed Displacement 1" on boundaries 1 | Direction = {1, 1, 0}
    bndl1: BoundaryLoad on boundaries 7 | FperArea = {0, -0.1, 0}

Mesh
  mesh1 "Mesh 1"
    size: MeshSizeDefault | hmax = mesh_size; hmin = mesh_size; custom = on
    ftri1: FreeTri "Free Triangular 1" on remaining entities

Studies
  std1 "Study 1"
    stat: Stationary

Solver configurations
  sol1 "Solution 1" (study std1)
    v1: Variables "Dependent Variables 1"
    s1: Stationary "Stationary Solver 1"
      dDef: Direct
      fc1: FullyCoupled | linsolver = dDef

Datasets
  dset1: Solution | solution = sol1
  cln1: CutLine2D | data = dset1; genpoints = {{0, 0.5}, {10, 0.5}}

Plots
  pg1: PlotGroup2D "Stress (solid)" | data = dset1; inputmode = linefirst
    surf1: Surface | expr = solid.mises
      def: Deform "Deformation" | expr = {u, v}; descr = Displacement field (Material)
  pg2: PlotGroup1D "1D Plot Group 2" | data = cln1
    lngr1: LineGraph | data = cln1; expr = v