// COMSOL Multiphysics 6.0.0.405 model "hwk5_3.mph"
// Outline of the model tree

Geometry
  geom1 "Geometry 1" (2D, length unit m)
    r1: Rectangle | size = {1, 1}
    fin: Finalize "Form Union"

Physics
  spf: LaminarFlow on all domains
    dependent variable u = {u, v, w}
    EquationForm.form = Stationary
    fp1: FluidProperties (default) | rho_mat = userdef; rho = 1; mu_mat = userdef; mu = 0.001
    init1: init "Initial Values 1" (default)
    wallbc1: WallBC "Wall 1" (default) | TranslationalVelocityOption = ZeroFixedWall
    wallbc2: WallBC "Wall 2" on boundaries 3 | BoundaryCondition = NoSlip; UseViscousSlip = 1; uvw = 1; SlidingWall = 1
    prpc1: PressurePointConstraint on points 1

Mesh
  mesh1 "Mesh 1" (physics-controlled)
    size: MeshSizeDefault | table = cfd; hauto = 4

Studies
  std1 "Study 1"
    stat: Stationary

Solver configurations
  sol1 "Solution 1" (study std1)
    v1: Variables "Dependent Variables 1"
    s1: Stationary "Stationary Solver 1"
      fc1: FullyCoupled | linsolver = d1; initstep = 0.01; maxiter = 100
      d1: Direct "Direct, fluid flow variables (spf)" | linsolver = pardiso; pivotperturb = 1.0E-13

Datasets
  dset1: Solution | solution = sol1
  cln1: CutLine2D | data = dset1; genpoints = {{0, 0.75}, {1, 0.75}}

Plots
  pg1: PlotGroup2D "Velocity (spf)" | data = dset1
    surf1: Surface | expr = spf.U
  pg2: PlotGroup2D "Pressure (spf)" | data = dset1
    con1: Contour | expr = p; levelrounding = off
  pg3: PlotGroup1D "1D Plot Group 3" | data = cln1
    lngr1: LineGraph | data = cln1; expr = spf.U